*Heading
** Job name: HS1_nr_light2 Model name: Model-1
** Generated by: Abaqus/CAE Unofficial Packaging Version
*Preprint, echo=NO, model=NO, history=NO, contact=NO
**
** PARTS
**
*Part, name=Part-1
*Node
*********************************************************
*********************************************************
*include, input=HS1_nr_l2_Nodes_extended.inp
*********************************************************
*********************************************************
*Element, type=S4R
   1,    1,   18,  958,  167
   2,   18,   19,  959,  958
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*Element, type=S3
7201, 7744, 7732, 7743
7202, 7770, 7872, 7780
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*Nset, nset=shell_full, generate
    1,  9436,     1
*Elset, elset=shell_full, generate
    1,  9371,     1
*Nset, nset=apex
 17,
*Nset, nset=shell_HS, generate
    1,  9436,     1
*Elset, elset=shell_HS, generate
    1,  9371,     1
*Nset, nset=shell_edge
   3,   4,  10,  13,  93,  94
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*Elset, elset=shell_edge
 1396, 1397, 1398, 1399, 1400, 1401
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*Nset, nset=shell_pinned14
   1,   2,   9,  12,  18,  19
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*Elset, elset=shell_pinned14
    1,    2,    3,    4,    5,    6
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*Nset, nset=shell_pinned13
   5,   6,  11,  14, 168, 169
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*Elset, elset=shell_pinned13
 1441, 1442, 1443, 1444, 1445, 1446
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*Nset, nset=shell_pinned10
   7,   8,  15,  16, 216, 217
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*Elset, elset=shell_pinned10
 1621, 1622, 1623, 1624, 1625, 1626
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*********************************************************
*********************************************************
*include, input=HS1_nr_l2_Sets.inp
*********************************************************
*********************************************************
*Elset, elset=_shell_Edge1_SNEG, internal, generate
    1,  9371,     1
*Surface, type=ELEMENT, name=shell_Edge1
_shell_Edge1_SNEG, SNEG
*Elset, elset=_shell_Edge2_SPOS, internal, generate
    1,  9371,     1
*Surface, type=ELEMENT, name=shell_Edge2
_shell_Edge2_SPOS, SPOS
*********************************************************
*********************************************************
*include, input=HS1_nr_l2_matset.inp
*********************************************************
*********************************************************
*End Part
**
**
** ASSEMBLY
**
*Assembly, name=Assembly
**
*Instance, name=Part-1-1, part=Part-1
*End Instance
**
*End Assembly
*Amplitude, name=Amp-1
           0.01,              0.,              0.5,              1.,     1.0, 1.
*********************************************************
*********************************************************
*include, input=Amplitudes_file.inp
*********************************************************
*********************************************************
**
** MATERIALS
**
*Material, name=LCE
*Density
 0.0013,
*Elastic
 1e+06, 0.3
*Expansion, type=ORTHO
 0.01, 0.01, 0.01
*Material, name=Ring
*Density
 0.0013,
*Elastic
 1e+09, 0.3
*Expansion, type=ORTHO
0.,0.,0.
*********************************************************
*********************************************************
*include, input=HS1_nr_l2_matprop_L0p6_20.inp
*********************************************************
*********************************************************
**
** BOUNDARY CONDITIONS
**
** Name: BC-1 Type: Symmetry/Antisymmetry/Encastre
*Boundary
Part-1-1.shell_pinned13, PINNED
**
** PREDEFINED FIELDS
**
** Name: Predefined Field-1   Type: Temperature
*Initial Conditions, type=TEMPERATURE
Part-1-1.shell_full, 25.
** ----------------------------------------------------------------
**
** STEP: Step-1
**
*Step, name=Step-1, nlgeom=YES, inc=10000
*Dynamic,application=MODERATE DISSIPATION,initial=NO
0.001,1.,1e-05,0.1
**
** LOADS
**
** Name: Load-1   Type: Gravity
*Dload
Part-1-1.shell_full, GRAV, 9800., 0., 1., 0.
** Name: Load-2   Type: Pressure
*Dsload, amplitude=Amp-1
Part-1-1.shell_Edge1, P, 156.8
**
** CONTROLS
**
*Controls, reset
*Controls, parameters=time incrementation
, , , , , , , 20, , ,
**
** OUTPUT REQUESTS
**
*Restart, write, frequency=0
**
** FIELD OUTPUT: F-Output-1
**
*Output, field, frequency=2
*Node Output
A, CF, COORD, NT, RF, U, V
*Element Output, directions=YES
E, EE, LE, MISES, NE, S, STH, TEMP
*Contact Output
CDISP, CSTATUS, CSTRESS
**
** HISTORY OUTPUT: H-Output-1
**
*Output, history, variable=PRESELECT
*End Step
** ----------------------------------------------------------------
**
** STEP: Step-2
**
*Step, name=Step-2, nlgeom=YES, inc=10000
*Dynamic,application=MODERATE DISSIPATION,initial=NO
0.001,10.,1e-06,0.1
**
** PREDEFINED FIELDS
**
** Name: Predefined Field-1   Type: Temperature
*Temperature, user
Part-1-1.shell_full
**
** OUTPUT REQUESTS
**
*Restart, write, frequency=0
**
** FIELD OUTPUT: F-Output-1
**
*Output, field, frequency=1
*Node Output
A, CF, COORD, NT, RF, U, V
*Element Output, directions=YES
E, EE, LE, MISES, NE,  S, STH, TEMP
*Contact Output
CDISP, CSTATUS, CSTRESS
**
** HISTORY OUTPUT: H-Output-1
**
*Output, history, variable=PRESELECT
*End Step
