*Heading
** Job name: VF_HS_1 Model name: Model-1
** Generated by: Abaqus/CAE Unofficial Packaging Version
*Preprint, echo=NO, model=NO, history=NO, contact=NO
**
** PARTS
**
*Part, name=Part-1
*Node
      1,   1.01298332,   19.9743309,           0.
      2,   3.02855563,   19.7693672,           0.
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*Element, type=R3D3
 1, 2668,  578,  618
 2,  520,  519,  558
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*Element, type=R3D4
  91, 2450,  706,  705, 2451
  92,   87,  665,  706, 2450
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*Node
   2942,           0.,          20.,           0.
*Nset, nset=Part-1-RefPt_, internal
2942,
*Nset, nset=Rigid_full, generate
    1,  2941,     1
*Elset, elset=Rigid_full, generate
    1,  2922,     1
*Nset, nset=rigid_edge
   22,   23,   24,   25,   26,   27
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*Elset, elset=rigid_edge
   91,   92,  132,  166,  182,  183
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*Elset, elset=_Rigid_internal_SNEG, internal, generate
    1,  2922,     1
*Surface, type=ELEMENT, name=Rigid_internal
_Rigid_internal_SNEG, SNEG
*Elset, elset=_rigid_external_SPOS, internal, generate
    1,  2922,     1
*Surface, type=ELEMENT, name=rigid_external
_rigid_external_SPOS, SPOS
*End Part
**
*Part, name=Part-2
*Node
      1,          20.,           0.,          25.
      2,         -20.,           0.,          25.
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*Element, type=S3
 1, 3027, 2996, 2921
 2, 3545, 2514, 2571
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*Element, type=S4R
  81, 1320, 1256,  209,  210
  82, 1457,  769, 1630, 1522
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*Nset, nset=LCE_full, generate
     1,  11896,      1
*Elset, elset=LCE_full, generate
     1,  11862,      1
*Nset, nset=LCE_circle
     1,     2,     7,     8,     9,    10
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*Elset, elset=LCE_circle
     1,     2,     3,     4,     5,     6
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*Nset, nset=LCE_edge
   1,   2,  86,  87,  88,  89
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*Elset, elset=LCE_edge
    81,   118,   119,   120,   121,   122
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*Nset, nset=LCE_leftout
    1,    2,    3,    4,    5,    6
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*Elset, elset=LCE_leftout, generate
 3073,  8810,     1
*Elset, elset=_LCE_negy_SNEG, internal
     1,     2,     3,     4,     5,     6
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*Surface, type=ELEMENT, name=LCE_negy
_LCE_negy_SNEG, SNEG
*Elset, elset=_LCE_posy_SPOS, internal
     1,     2,     3,     4,     5,     6
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*Surface, type=ELEMENT, name=LCE_posy
_LCE_posy_SPOS, SPOS
** Section: Section-1
*Shell Section, elset=LCE_full, material=LCE
0.5, 11
*End Part
**
**
** ASSEMBLY
**
*Assembly, name=Assembly
**
*Instance, name=Part-2-1, part=Part-2
          0.,        -0.25,           0.
*End Instance
**
*Instance, name=Part-1-1, part=Part-1
          0.,           0.,          25.
*End Instance
**
*Nset, nset=_PickedSet11, internal, instance=Part-1-1
 2942,
** Constraint: Constraint-1
*Rigid Body, ref node=_PickedSet11, elset=Part-1-1.Rigid_full
*Elset, elset=__Int-1_msm_1_SNEG, internal, instance=Part-1-1, generate
    1,  2922,     1
*Surface, type=ELEMENT, name=_Int-1_msm_1, internal
__Int-1_msm_1_SNEG, SNEG
*End Assembly
*Amplitude, name=Amp-1
           0.01,         100000.,             0.1, 98728.9332240862,             0.2, 97474.0225556606,             0.3, 96235.0626398089
            0.4, 95011.8507318144,             0.5, 93804.1866639814,             0.6, 92611.8728128794,             0.7, 91434.7140670033
            0.8, 90272.5177948458,             0.9, 89125.0938133746,              1., 89125.0938133746
*Amplitude, name=Amp-2
             0.,              0.,            0.01,            0.01,            0.02,            0.02,            0.03,            0.03
           0.04,            0.04,            0.05,            0.05,            0.06,            0.06,            0.07,            0.07
           0.08,            0.08,            0.09,            0.09,             0.1,             0.1,            0.11,            0.11
           0.12,            0.12,            0.13,            0.13,            0.14,            0.14,            0.15,            0.15
           0.16,            0.16,            0.17,            0.17,            0.18,            0.18,            0.19,            0.19
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             1.,              1.
**
** MATERIALS
**
*Material, name=LCE
*Density
 0.0013,
*Elastic
 1e+06, 0.5
*Expansion, type=ORTHO
0.,0.,0.
**
** INTERACTION PROPERTIES
**
*Surface Interaction, name=IntProp-1
1.,
*Friction
0.,
*Surface Behavior, pressure-overclosure=HARD
*Surface Smoothing, name=Int-1
, _Int-1_msm_1, SPHERICAL, 0., 0., 25.
**
** PREDEFINED FIELDS
**
** Name: Predefined Field-1   Type: Temperature
*Initial Conditions, type=TEMPERATURE
Part-2-1.LCE_full, 110.
**
** INTERACTIONS
**
** Interaction: Int-1
*Contact Pair, interaction=IntProp-1, type=SURFACE TO SURFACE, adjust=0.0, geometric correction=Int-1
Part-2-1.LCE_negy, Part-1-1.Rigid_internal
** ----------------------------------------------------------------
**
** STEP: Step-1
**
*Step, name=Step-1, nlgeom=YES, inc=10000
*Static, stabilize=2e-05, allsdtol=0.05, continue=NO
0.001, 1., 1e-12, 0.01
**
** BOUNDARY CONDITIONS
**
** Name: BC-1 Type: Symmetry/Antisymmetry/Encastre
*Boundary
Part-1-1.rigid_edge, ENCASTRE
** Name: BC-2 Type: Symmetry/Antisymmetry/Encastre
*Boundary
Part-2-1.LCE_edge, ENCASTRE
**
** LOADS
**
** Name: Load-1   Type: Pressure
*Dsload, amplitude=Amp-2
Part-2-1.LCE_negy, P, -100000.
**
** INTERACTIONS
**
** Interaction: Int-1
*Contact Interference, shrink
Part-2-1.LCE_negy, Part-1-1.Rigid_internal
**
** CONTROLS
**
*Controls, reset
*Controls, parameters=time incrementation
, , , , , , , 20, , ,
**
** OUTPUT REQUESTS
**
*Restart, write, frequency=0
**
** FIELD OUTPUT: F-Output-1
**
*Output, field, frequency=2
*Node Output
CF, COORD, RF, RM, RT, U, UR, UT
*Element Output, directions=YES
E, EE, HP, LE, MISES, NE, P, PE, PEEQ, PEMAG, S, SE, SF, STH, TE
*Contact Output
CDISP, CSTATUS, CSTRESS
**
** HISTORY OUTPUT: H-Output-1
**
*Output, history, variable=PRESELECT
*End Step
